// COMSOL Multiphysics 5.4.0.225 model "Microfluidic_chemistry_test.mph"
// Outline of the model tree

Parameters
  a1 = 0.1  // Initial Spiral
  a2 = 4  // Final Spiral
  n = 5  // No of Spiral
  thickness = 0.1  // thickness of spiral
  theta0 = 0  // Initial Angle
  b = (a2-a1)/(2*pi*n)  // Spiral Growth Rate
  theta1 = (a2-a1)/b  // Final Angle

Functions
  an1: Analytic "X_func" | funcname = X_func; expr = (a1+b*t)*cos(t); args = t
  an2: Analytic "Y_func" | funcname = Y_func; expr = (a1+b*t)*sin(t); args = t
  an3: Analytic "Thickness_X" | funcname = N_x; expr = -d(Y_func(t),t)/sqrt(d(X_func(t),t)^2+d(Y_func(t),t)^2); args = t
  an4: Analytic "Thickness_Y" | funcname = N_y; expr = d(X_func(t),t)/sqrt(d(X_func(t),t)^2+d(Y_func(t),t)^2); args = t

Geometry
  geom1 "Geometry 1" (3D, length unit cm)
    wp1: WorkPlane | unite = on
      pc1: ParametricCurve | parname = t; parmin = theta0; parmax = theta1; coord = {X_func(t), Y_func(t)}
      pc2: ParametricCurve
        parname = t
        parmin = theta0
        parmax = theta1
        coord = {(a1+b*t)*cos(t)+N_x(t)*thickness, (a1+b*t)*sin(t)+N_y(t)*thickness}
      b1: BezierPolygon "Bézier Polygon 1" | p = {{0.037267942507, 0.1}, {0.0778761129146, 0}}; degree = 1; w = {1, 1}
      b2: BezierPolygon "Bézier Polygon 2" | p = {{3.9000481244633, 4}, {0.00310202783729, 0}}; degree = 1; w = {1, 1}
      csol1: ConvertToSolid | input = b1, b2, pc1, pc2
      csol2: ConvertToSolid | input = csol1
      rot1: Rotate | input = csol2; keep = on; rot = 180
      b3: BezierPolygon "Bézier Polygon 3"
        p = 
          {0.037267942507, -0.1, -0.037267942507, 0.1, 0.037267942507}
          {0.0778761129146, 0, -0.0778761129146, 0, 0.0778761129146}
        degree = {1, 1, 1, 1}
        w = {1, 1, 1, 1, 1, 1, 1, 1}
      r1: Rectangle | pos = {-10, 0}; size = {6, 0.1}
      r2: Rectangle | pos = {3.9, 0}; size = {4, 0.1}
      r3: Rectangle | pos = {-6, -3.9}; size = {0.1, 4}
      c1: Circle "Inlet1_Circle" | pos = {-10, 0.05}; r = 0.23
      c2: Circle "Inlet_2_Circle" | pos = {-5.95, -3.9}; r = 0.23
      c3: Circle "Outlet_1_Circle" | pos = {7.9, 0.05}; r = 0.23
    ext1: Extrude | workplane = wp1; input = wp1; distance = 0.1
    fin: Finalize "Form Union"

Materials
  mat1: Common "Water" on all domains
    def "Basic"
      thermalexpansioncoefficient = alpha_p(T)
      bulkviscosity = muB(T)
      dynamicviscosity = eta(T)
      ratioofspecificheat = gamma_w(T)
      electricconductivity = 5.5e-6[S/m]
      heatcapacity = Cp(T)
      density = rho(T)
      thermalconductivity = k(T)
      soundspeed = cs(T)
      eta: Piecewise
        arg = T
        pieces = 
          {273.15, 413.15, 1.3799566804-0.021224019151*T^1+1.3604562827E-4*T^2-4.6454090319E-7*T^3+8.9042735735E-10*T^4-9.0790692686E-13*T^5+3.8457331488E-16*T^6}
          {413.15, 553.75, 0.00401235783-2.10746715E-5*T^1+3.85772275E-8*T^2-2.39730284E-11*T^3}
        argunit = K
        fununit = Pa*s
      Cp: Piecewise | arg = T; pieces = {273.15, 553.75, 12010.1471-80.4072879*T^1+0.309866854*T^2-5.38186884E-4*T^3+3.62536437E-7*T^4}; argunit = K; fununit = J/(kg*K)
      rho: Piecewise
        arg = T
        smooth = contd1
        pieces = 
          {273.15, 293.15, 6.3092789034e-05*T^3-0.0603676398829*T^2+18.9229382407066*T-950.704055329848}
          {293.15, 373.15, 1.0335053319e-05*T^3-0.0133950656345*T^2+4.96928883266*T+432.257114008512}
        argunit = K
        fununit = kg/m^3
      k: Piecewise | arg = T; pieces = {273.15, 553.75, -0.869083936+0.00894880345*T^1-1.58366345E-5*T^2+7.97543259E-9*T^3}; argunit = K; fununit = W/(m*K)
      cs: Interpolation | table = {{273, 1403}, {278, 1427}, {283, 1447}, {293, 1481}, {303, 1507}, {313, 1526}, {323, 1541}, {333, 1552}, {343, 1555}, {353, 1555}, {363, 1550}, {373, 1543}}; interp = piecewisecubic; argunit = K; fununit = m/s
      an1: Analytic | funcname = alpha_p; expr = -1/rho(T)*d(rho(T),T); args = T; argunit = K; fununit = 1/K
      an2: Analytic | funcname = gamma_w; expr = 1+(T/Cp(T))*(alpha_p(T)*cs(T))^2; args = T; argunit = K; fununit = 1
      an3: Analytic | funcname = muB; expr = 2.79*eta(T); args = T; argunit = K; fununit = Pa*s

Physics
  spf: CreepingFlow on all domains
    dependent variable u = {u, v, w}
    fp1: FluidProperties (default)
    init1: init "Initial Values 1" (default)
    wallbc1: WallBC "Wall 1" (default)
    inl1: InletBoundary "Inlet 1" on boundaries 4
      BoundaryCondition = Velocity
      ComponentWise = NormalInflowVelocity
      U0in = 0.00003
    inl2: InletBoundary "Inlet 2" on boundaries 21 | U0in = 0.00003
    out1: OutletBoundary "Outlet 1" on boundaries 79
  tds: DilutedSpecies "Transport of Diluted Species" on all domains
    dependent variable c
    cdm1: ConvectionDiffusionMigration "Transport Properties 1" (default) | DiffusionMaterialList = mat1
    nflx1: NoFlux (default)
    init1: init "Initial Values 1" (default)
    in1: Inflow on boundaries 4
    in2: Inflow on boundaries 21 | c0 = 1
    out1: Outflow on boundaries 79

Mesh
  mesh1 "Mesh 1" (physics-controlled)
    size: MeshSizeDefault | table = cfd; hauto = 8

Studies
  std1 "Study 1"
    stat: Stationary